*Heading
** Job name: brain-thin2 Model name: Model-1
** Generated by: Abaqus/CAE 2018
*Preprint, echo=NO, model=NO, history=NO, contact=NO
**
** PARTS
**
*Part, name=Part-1
*Node
      1,           0.,         -48.,           0.
      2,           0.,          48.,           0.
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*Element, type=C3D8R
   1,    5,    1,   62,  252,  689,   66,  554, 3158
   2,  520,  254,  253,  479, 3426, 3160, 3159, 3385
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*Nset, nset=Set-1, generate
    1,  8034,     1
*Elset, elset=Set-1, generate
    1,  6685,     1
*Nset, nset=fix
    3,    4,   71,   72,   73,   74
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*Elset, elset=fix
 1353, 1354, 1355, 1356, 1357, 1358
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*Elset, elset=_master_S1, internal
    1,    2,    3,    4,    5,    6
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*Surface, type=ELEMENT, name=master
_master_S1, S1
** Section: Section-1
*Solid Section, elset=Set-1, material=Material-1
,
*End Part
**
*Part, name=Part-2
*Node
      1,           0.,         -50.,           0.
      2,           0.,          50.,           0.
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*Element, type=C3D8R
   1,  891,    5,    1,  212, 4799,  317,    3,  316
   2,  907,  876,  891,  892, 4815, 4784, 4799, 4800
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*Nset, nset=Set-1, generate
     1,  32832,      1
*Elset, elset=Set-1, generate
     1,  16414,      1
*Elset, elset=_free_S1, internal, generate
     1,  16414,      1
*Surface, type=ELEMENT, name=free
_free_S1, S1
*Elset, elset=_slave_S2, internal, generate
     1,  16414,      1
*Surface, type=ELEMENT, name=slave
_slave_S2, S2
** Section: Section-2
*Solid Section, elset=Set-1, material=Material-2
,
*End Part
**
**
** ASSEMBLY
**
*Assembly, name=Assembly
**
*Instance, name=Part-1-1, part=Part-1
*End Instance
**
*Instance, name=Part-2-1, part=Part-2
*End Instance
**
** Constraint: Constraint-1
*Tie, name=Constraint-1, adjust=yes
Part-2-1.slave, Part-1-1.master
*End Assembly
**
** MATERIALS
**
*Material, name=Material-1
*Density
 8e-09,
*Hyperelastic, neo hooke
1., 0.03
*Material, name=Material-2
*Density
 8e-09,
*Expansion
 0.01,
*Hyperelastic, neo hooke
2., 0.03
**
** INTERACTION PROPERTIES
**
*Surface Interaction, name=IntProp-1
**
** BOUNDARY CONDITIONS
**
** Name: BC-1 Type: Symmetry/Antisymmetry/Encastre
*Boundary
Part-1-1.fix, ENCASTRE
** ----------------------------------------------------------------
**
** STEP: Step-1
**
*Step, name=Step-1, nlgeom=YES
*Dynamic, Explicit
, 0.05
*Bulk Viscosity
0.06, 1.2
**
** PREDEFINED FIELDS
**
** Name: Predefined Field-1   Type: Temperature
*Temperature
Part-2-1.Set-1, 300.
**
** INTERACTIONS
**
** Interaction: Int-1
*Contact Pair, interaction=IntProp-1, mechanical constraint=PENALTY, cpset=Int-1
Part-2-1.free,
**
** OUTPUT REQUESTS
**
*Restart, write, number interval=1, time marks=NO
**
** FIELD OUTPUT: F-Output-1
**
*Output, field, variable=PRESELECT
**
** HISTORY OUTPUT: H-Output-1
**
*Output, history, variable=PRESELECT
*End Step
